<?xml version="1.0"?>

<!--
  File:     128-RC18.xml
  Author:   AeromatiC++ v 3.3.10

  See: http://wiki.flightgear.org/JSBSim_Engines#FGPiston

  Inputs:
    name:           128-RC18
    type:           Piston Engine
    power:          860 hp
-->

<piston_engine name="128-RC18">
  <minmp unit="INHG">         10.0 </minmp>
  <maxmp unit="INHG">         28.5 </maxmp>
    <displacement unit="IN3"> 1634 </displacement>
  <maxhp>        860 </maxhp>
  <cycles>         4.0 </cycles>
  <idlerpm>      700.0 </idlerpm>
  <maxrpm>      2800.0 </maxrpm>
  <sparkfaildrop>  0.1 </sparkfaildrop>
  <volumetric-efficiency> 0.85 </volumetric-efficiency>
  <man-press-lag> 0.1 </man-press-lag>
  <static-friction  unit="HP"> 4.3 </static-friction>
  <starter-torque> 688 </starter-torque>
  <starter-rpm> 1400 </starter-rpm>
 <!-- Defining <bsfc> over-rides the built-in horsepower calculations -->
 <!--<bsfc>           0.45 </bsfc>-->
  <stroke unit="IN">  4.375 </stroke>
  <bore unit="IN">    5.125 </bore>
  <cylinders>         18  </cylinders>
  <compression-ratio>  8.0 </compression-ratio>
</piston_engine>
